16.01.2025
13:50
$PROBLEM    1cmt_iv_est_covar_r_matrix
$INPUT      ID TIME EVID AMT RATE DV MDV
$DATA      sim_data.csv IGNORE=@
$SUBROUTINE ADVAN1 TRANS2
$PK
; define fixed effects parameters
CL = THETA(1) * EXP(ETA(1))
V = THETA(2)

; scaling
S1=V

$THETA  (0,0.1,1) ; 1 TVCL
 3.15 FIX ; 2 TVV
$OMEGA  0.15  ;    1 OM_CL
$SIGMA  0.1  FIX  ;  1 SIG_ADD
$ERROR
; add additive error
Y = F + EPS(1)

; store error for table output
ERR1 = EPS(1)

$ESTIMATION METHOD=COND LAPLACIAN MAXEVAL=9999 SIGDIG=3 PRINT=1
            NOABORT POSTHOC
$COVARIANCE MATRIX=R PRINT=E
$TABLE      ID TIME EVID AMT RATE DV MDV ETA1 ERR1 CL NOAPPEND
            ONEHEADER NOPRINT FILE=estim_out_covar_r_matrix

NM-TRAN MESSAGES
 WARNINGS AND ERRORS (IF ANY) FOR PROBLEM    1
 (WARNING  2) NM-TRAN INFERS THAT THE DATA ARE POPULATION.

1NONLINEAR MIXED EFFECTS MODEL PROGRAM (NONMEM) VERSION 7.5.1
 ORIGINALLY DEVELOPED BY STUART BEAL, LEWIS SHEINER, AND ALISON BOECKMANN
 CURRENT DEVELOPERS ARE ROBERT BAUER, ICON DEVELOPMENT SOLUTIONS,
 AND ALISON BOECKMANN. IMPLEMENTATION, EFFICIENCY, AND STANDARDIZATION
 PERFORMED BY NOUS INFOSYSTEMS.
 PROBLEM NO.:         1
 1cmt_iv_est_covar_r_matrix
 TOT. NO. OF OBS RECS:       50
 TOT. NO. OF INDIVIDUALS:       10
 ONE COMPARTMENT MODEL (ADVAN1)
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 #TBLN:      1
 #METH: Laplacian Conditional Estimation
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
 #TERM:
0MINIMIZATION SUCCESSFUL
 NO. OF FUNCTION EVALUATIONS USED:       71
 NO. OF SIG. DIGITS IN FINAL EST.:  4.5

 ETABAR IS THE ARITHMETIC MEAN OF THE ETA-ESTIMATES,
 AND THE P-VALUE IS GIVEN FOR THE NULL HYPOTHESIS THAT THE TRUE MEAN IS 0.

 ETABAR:        -1.8954E-05
 SE:             1.0473E-01
 N:                      10

 P VAL.:         9.9986E-01

 ETASHRINKSD(%)  1.5107E-01
 ETASHRINKVR(%)  3.0192E-01
 EBVSHRINKSD(%)  1.3728E-01
 EBVSHRINKVR(%)  2.7437E-01
 RELATIVEINF(%)  9.9726E+01
 EPSSHRINKSD(%)  1.8336E+01
 EPSSHRINKVR(%)  3.3311E+01


 TOTAL DATA POINTS NORMALLY DISTRIBUTED (N):           50
 N*LOG(2PI) CONSTANT TO OBJECTIVE FUNCTION:    91.893853320467272
 OBJECTIVE FUNCTION VALUE WITHOUT CONSTANT:   -12.824593381265490
 OBJECTIVE FUNCTION VALUE WITH CONSTANT:       79.069259939201785
 REPORTED OBJECTIVE FUNCTION DOES NOT CONTAIN CONSTANT

 TOTAL EFFECTIVE ETAS (NIND*NETA):                            10


 #TERE:
 Elapsed estimation  time in seconds:     0.04
 Elapsed covariance  time in seconds:     0.01
 Elapsed postprocess time in seconds:     0.00

 ********************                         LAPLACIAN CONDITIONAL ESTIMATION                       ********************
 #OBJT:**************                       MINIMUM VALUE OF OBJECTIVE FUNCTION                      ********************
 #OBJV:********************************************      -12.825       **************************************************

 ********************                         LAPLACIAN CONDITIONAL ESTIMATION                       ********************
 ********************                             FINAL PARAMETER ESTIMATE                           ********************

 THETA - VECTOR OF FIXED EFFECTS PARAMETERS   *********
         TH 1      TH 2
         2.47E-01  3.15E+00

 OMEGA - COV MATRIX FOR RANDOM EFFECTS - ETAS  ********
         ETA1
 ETA1
+        1.10E-01

 SIGMA - COV MATRIX FOR RANDOM EFFECTS - EPSILONS  ****
         EPS1
 EPS1
+        1.00E-01

 OMEGA - CORR MATRIX FOR RANDOM EFFECTS - ETAS  *******
         ETA1
 ETA1
+        3.32E-01

 SIGMA - CORR MATRIX FOR RANDOM EFFECTS - EPSILONS  ***
         EPS1
 EPS1
+        3.16E-01

 ********************                         LAPLACIAN CONDITIONAL ESTIMATION                       ********************
 ********************                            STANDARD ERROR OF ESTIMATE                          ********************

 THETA - VECTOR OF FIXED EFFECTS PARAMETERS   *********
         TH 1      TH 2
         2.59E-02 .........

 OMEGA - COV MATRIX FOR RANDOM EFFECTS - ETAS  ********
         ETA1
 ETA1
+        4.93E-02

 SIGMA - COV MATRIX FOR RANDOM EFFECTS - EPSILONS  ****
         EPS1
 EPS1
+       .........

 OMEGA - CORR MATRIX FOR RANDOM EFFECTS - ETAS  *******
         ETA1
 ETA1
+        7.44E-02

 SIGMA - CORR MATRIX FOR RANDOM EFFECTS - EPSILONS  ***
         EPS1
 EPS1
+       .........

 ********************                         LAPLACIAN CONDITIONAL ESTIMATION                       ********************
 ********************                          COVARIANCE MATRIX OF ESTIMATE                         ********************

            TH 1      TH 2      OM11      SG11
 TH 1
+        6.71E-04
 TH 2
+       ......... .........
 OM11
+        2.42E-07 .........  2.43E-03
 SG11
+       ......... ......... ......... .........

 ********************                         LAPLACIAN CONDITIONAL ESTIMATION                       ********************
 ********************                          CORRELATION MATRIX OF ESTIMATE                        ********************

            TH 1      TH 2      OM11      SG11
 TH 1
+        2.59E-02
 TH 2
+       ......... .........
 OM11
+        1.89E-04 .........  4.93E-02
 SG11
+       ......... ......... ......... .........
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
 ********************                         LAPLACIAN CONDITIONAL ESTIMATION                       ********************
 ********************                      EIGENVALUES OF COR MATRIX OF ESTIMATE                     ********************

             1         2
         1.00E+00  1.00E+00
 Elapsed finaloutput time in seconds:     0.02
 #CPUT: Total CPU Time in Seconds,        0.063
