Mon 12/30/2024
10:45 PM
$PROBLEM    1cmt_iv_sim
$INPUT      ID TIME EVID AMT RATE DV MDV
$DATA      input_data.csv IGNORE=@
$SUBROUTINE ADVAN1 TRANS2
$PK
; define fixed effects parameters
CL = THETA(1) * EXP(ETA(1))
V = THETA(2)

; scaling
S1=V

$THETA  (0,0.2,1) ; 1 TVCL
 3.15 FIX ; 2 TVV
$OMEGA  0.2  ;    1 OM_CL
$SIGMA  0.1  FIX  ;  1 SIG_ADD
$ERROR
; add additive error
Y = F + EPS(1)

; store error for table output
ERR1 = EPS(1)

; $ESTIMATION METHOD=0 MAXEVAL=9999 SIGDIG=4 PRINT=1 NOABORT
$SIMULATION (12345678) ONLYSIM
$TABLE      ID TIME EVID AMT RATE DV MDV ETA1 ERR1 NOAPPEND ONEHEADER
            NOPRINT FILE=sim_out

NM-TRAN MESSAGES
 WARNINGS AND ERRORS (IF ANY) FOR PROBLEM    1
 (WARNING  2) NM-TRAN INFERS THAT THE DATA ARE POPULATION.
Note: Analytical 2nd Derivatives are constructed in FSUBS but are never used.
      You may insert $ABBR DERIV2=NO after the first $PROB to save FSUBS construction and compilation time

1NONLINEAR MIXED EFFECTS MODEL PROGRAM (NONMEM) VERSION 7.5.1
 ORIGINALLY DEVELOPED BY STUART BEAL, LEWIS SHEINER, AND ALISON BOECKMANN
 CURRENT DEVELOPERS ARE ROBERT BAUER, ICON DEVELOPMENT SOLUTIONS,
 AND ALISON BOECKMANN. IMPLEMENTATION, EFFICIENCY, AND STANDARDIZATION
 PERFORMED BY NOUS INFOSYSTEMS.
 PROBLEM NO.:         1
 1cmt_iv_sim
 TOT. NO. OF OBS RECS:       50
 TOT. NO. OF INDIVIDUALS:       10
 ONE COMPARTMENT MODEL (ADVAN1)
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 SIMULATION STEP PERFORMED
 Elapsed simulation  time in seconds:     0.01
 Elapsed finaloutput time in seconds:     0.01
 #CPUT: Total CPU Time in Seconds,        0.000
